units		real
atom_style	full
pair_style      sw
atom_modify     map array sort 0 0.0

read_data	NPT1.lmp


pair_coeff * * epsA.B.sw A B


neighbor        1.0 bin
neigh_modify    every 1 delay 0 check yes


# -- Run section --
compute thermo_ke all ke
timestep   ${dt}

# -- Run section --
velocity        all create 310 ${seed} dist gaussian mom yes


#thermo      10
#thermo_style custom step temp etotal pe ke lx press density


fix 1 all nve
#unfix 1
run     ${nsteps}

write_data NPT_NVE.lmp
